*Heading
** Job name: Job-6 Model name: Model-2
** Generated by: Abaqus/CAE 2025
*Preprint, echo=NO, model=NO, history=NO, contact=NO
**
** PARTS
**
*Part, name=Part-1
*End Part
**
*Part, name=rigid2
*End Part
**
**
** ASSEMBLY
**
*Assembly, name=Assembly
**
*Instance, name=Part-1-1, part=Part-1
*Node
       1,             20,             20,             10
       2,             20,             19,             10
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*Element, type=C3D8
   1,  232,  233,  254,  253,    1,    2,   23,   22
   2,  233,  234,  255,  254,    2,    3,   24,   23
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*Nset, nset=_PickedSet12, internal, generate
    1,  4851,     1
*Elset, elset=_PickedSet12, internal, generate
    1,  4000,     1
** Section: Section-1
*Solid Section, elset=_PickedSet12, material=Material-1
,
*End Instance
**
*Instance, name=rigid2-1, part=rigid2
             5,              5,             10
*Node
       1,              0,              0,              0
       2,              2,              0,              0
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*Element, type=R3D4
 1,  1,  2,  8,  7
 2,  2,  3,  9,  8
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*Node
      37,              0,              5,              0
*Nset, nset=rigid2-1-RefPt_, internal
37,
*Elset, elset=rigid2-1, generate
  1,  25,   1
*End Instance
**
*Nset, nset=Set-1, instance=Part-1-1
  211,  212,  213,  214,  215,  216
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*Nset, nset=_PickedSet6, internal, instance=Part-1-1
  211,  212,  213,  214,  215,  216
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*Elset, elset=_PickedSet6, internal, instance=Part-1-1
  181,  182,  183,  184,  185,  186
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*Nset, nset=_PickedSet19, internal, instance=rigid2-1
 37,
*Elset, elset=__PickedSurf20_SNEG, internal, instance=rigid2-1, generate
  1,  25,   1
*Surface, type=ELEMENT, name=_PickedSurf20, internal
__PickedSurf20_SNEG, SNEG
*Elset, elset=__PickedSurf21_S3, internal, instance=Part-1-1
    1,    2,    3,    4,    5,    6
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*Surface, type=ELEMENT, name=_PickedSurf21, internal
__PickedSurf21_S3, S3
*Rigid Body, ref node=rigid2-1.rigid2-1-RefPt_, elset=rigid2-1.rigid2-1
*Nset, nset="_T-Part-1-1-Datum csys-1", internal
_PickedSet6,
_PickedSet19,
*Transform, nset="_T-Part-1-1-Datum csys-1"
          1.,           0.,           0.,           0.,           1.,           0.
*End Assembly
*Amplitude, name=Amp-1
             0.,              0.,             0.1,            0.05,             0.2,             0.1,             0.3,            0.15
            0.4,             0.2,             0.5,            0.25,             0.6,             0.3,             0.7,            0.35
            0.8,             0.4,             0.9,            0.45,              1.,             0.5
**
** MATERIALS
**
*Material, name=Material-1
*Elastic
100000., 0.49
*Material, name=Material-2
*Elastic
100000., 0.49
**
** INTERACTION PROPERTIES
**
*Surface Interaction, name=IntProp-1
1.,
*Surface Behavior, pressure-overclosure=HARD
**
** BOUNDARY CONDITIONS
**
** Name: BC-1 Type: Symmetry/Antisymmetry/Encastre
*Boundary
_PickedSet6, ENCASTRE
** Name: BC-2 Type: Displacement/Rotation
*Boundary
_PickedSet19, 3, 3
**
** INTERACTIONS
**
** Interaction: Int-1
*Contact Pair, interaction=IntProp-1
_PickedSurf21, _PickedSurf20
** ----------------------------------------------------------------
**
** STEP: Step-1
**
*Step, name=Step-1, nlgeom=YES, inc=10000
*Static
1e-05, 1., 1e-15, 1.
**
** BOUNDARY CONDITIONS
**
** Name: BC-2 Type: Displacement/Rotation
*Boundary, amplitude=Amp-1
_PickedSet19, 1, 1
_PickedSet19, 2, 2
_PickedSet19, 3, 3, -2.5
_PickedSet19, 4, 4
_PickedSet19, 5, 5
_PickedSet19, 6, 6
**
** OUTPUT REQUESTS
**
*Restart, write, frequency=0
**
** FIELD OUTPUT: F-Output-1
**
*Output, field, variable=PRESELECT
*Contact Output
CPRESS, COPEN, CSTATUS
**
** HISTORY OUTPUT: H-Output-1
**
*Output, history, variable=PRESELECT
*End Step
